*Heading
** Job name: Job-4 Model name: Model-1-Copy
** Generated by: Abaqus/CAE 2024
*Preprint, echo=NO, model=NO, history=NO, contact=NO
**
** PARTS
**
*Part, name="P3D End Mill"
*Node
      1, 0.00117881014,           0., 0.000316465856
      2, 0.0012030662,           0., 0.000278383523
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*Element, type=C3D4T
    1, 1710, 1711, 1712, 1713
    2, 1710, 1714, 1715, 1716
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*Node
   4261, -6.25660634e-10, -4.78115325e-10, 0.00600000005
*Nset, nset="P3D End Mill-RefPt_", internal
4261,
*Nset, nset=_PickedSet17, internal, generate
    1,  4260,     1
*Elset, elset=_PickedSet17, internal, generate
     1,  20274,      1
** Section: Carbide
*Solid Section, elset=_PickedSet17, material=Carbide
,
*End Part
**
*Part, name=Wp
*Node
      1, -0.000304780144, 0.000782503048,           0.
      2, -0.000304780144, 0.000782503048, 0.00400000019
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*Element, type=C3D8RT
   1,  160, 1279, 6030, 1039,    1,   17,  583,   78
   2, 1279, 1280, 6031, 6030,   17,   18,  584,  583
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*Nset, nset=Set-54, generate
     1,  20412,      1
*Elset, elset=Set-54, generate
     1,  17860,      1
** Region: (Ti64:Set-54), (Controls:EC-1)
*Elset, elset=_I1, internal
     1,     2,     3,     4,     5,     6
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** Section: Ti64
*Solid Section, elset=_I1, controls=EC-1, material=Ti6Al4V
,
** Region: (Ti64:Set-54), (Controls:EC-2)
*Elset, elset=_I2, internal, generate
 2861,  6860,     1
** Section: Ti64
*Solid Section, elset=_I2, controls=EC-2, material=Ti6Al4V
,
*End Part
**
**
** ASSEMBLY
**
*Assembly, name=Assembly
**
*Instance, name=Wp-1, part=Wp
   -0.003465,     0.004717,        0.004
   -0.003465,     0.004717,        0.004,    -0.003465,     1.004717,        0.004,         180.
*End Instance
**
*Instance, name="P3D End Mill-1", part="P3D End Mill"
   -0.000119,           0.,           0.
   -0.000119,           0.,           0.,    -0.000119,           0., 1.00000001195497, 36.8849992240921
*End Instance
**
*Node
      1, -0.000118999997, -2.48750803e-12,           0.
*Nset, nset=Set-1, instance=Wp-1
    13,    14,   225,   226,   227,   228
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*Nset, nset=Set-2, instance="P3D End Mill-1"
 1297,
*Nset, nset=_PickedSet25, internal, instance="P3D End Mill-1"
 4261,
*Nset, nset=_PickedSet27, internal, instance=Wp-1
    1,    2,    3,    4,    6,    7
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*Elset, elset=_PickedSet27, internal, instance=Wp-1
    1,    2,    3,    4,    5,    6
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*Nset, nset=_PickedSet28, internal, instance=Wp-1, generate
     1,  20412,      1
*Elset, elset=_PickedSet28, internal, instance=Wp-1, generate
     1,  17860,      1
*Nset, nset=_PickedSet29, internal, instance="P3D End Mill-1", generate
    1,  4260,     1
*Elset, elset=_PickedSet29, internal, instance="P3D End Mill-1", generate
     1,  20274,      1
*Nset, nset=_PickedSet30, internal, instance="P3D End Mill-1"
 4261,
*Nset, nset=_PickedSet31, internal, instance="P3D End Mill-1", generate
    1,  4260,     1
*Elset, elset=_PickedSet31, internal, instance="P3D End Mill-1", generate
     1,  20274,      1
*Nset, nset=_PickedSet36, internal, instance="P3D End Mill-1"
 4261,
*Elset, elset=_m_Surf-1_S1, internal, instance="P3D End Mill-1"
   517,   563,  2483,  2501,  2502,  2594
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*Elset, elset=_m_Surf-1_S2, internal, instance="P3D End Mill-1"
   498,  1307,  1552,  2501,  2502,  2535
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*Elset, elset=_m_Surf-1_S3, internal, instance="P3D End Mill-1"
    25,    29,    67,    85,   185,   278
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*Elset, elset=_m_Surf-1_S4, internal, instance="P3D End Mill-1"
    21,   109,   113,   118,   128,   147
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*Surface, type=ELEMENT, name=m_Surf-1
_m_Surf-1_S1, S1
_m_Surf-1_S2, S2
_m_Surf-1_S4, S4
_m_Surf-1_S3, S3
*Surface, type=NODE, name=Set-1_CNS_, internal
Set-1, 1.
** Constraint: Constraint-1
*Rigid Body, ref node=_PickedSet30, elset=_PickedSet31
** Constraint: Constraint-2
*Rigid Body, ref node=_PickedSet36, pin nset=Set-2
*End Assembly
**
** ELEMENT CONTROLS
**
*Section Controls, name=EC-1, DISTORTION CONTROL=YES, ELEMENT DELETION=YES
1., 1., 1.
*Section Controls, name=EC-2, DISTORTION CONTROL=YES, ELEMENT DELETION=YES, hourglass=ENHANCED
1., 1., 1.
**
** MATERIALS
**
*Material, name=Carbide
*Conductivity
55.,
*Density
15000.,
*Elastic
 6.4e+11, 0.22
*Expansion
 6e-06,
*Specific Heat
240.,
*Material, name=Ti6Al4V
*Conductivity
 7.2,
*Damage Initiation, criterion=JOHNSON COOK
 -0.09,  0.25,   0.5, 0.014,  3.87, 1560.,   25., 0.011
*Damage Evolution, type=ENERGY
500.,
*Density
4470.,
*Elastic
 1.15e+11, 0.32
*Expansion
 8.85e-06,
*Inelastic Heat Fraction
         0.9,
*Plastic, hardening=JOHNSON COOK
 1.098e+08, 1.092e+08,      0.93,       1.1,     1560.,       25.
*Rate Dependent, type=JOHNSON COOK
 0.014, 0.011
*Specific Heat
560.,
*Material, name=Ti6Al4V-Plastic
*Conductivity
 7.2,
*Density
4470.,
*Depvar, delete=1
      1,
*Elastic
 1.15e+11, 0.32
*Expansion
 8.85e-06,
*Inelastic Heat Fraction
         0.9,
*Plastic, hardening=JOHNSON COOK
 1.098e+08, 1.092e+08,      0.93,       1.1,     1560.,       25.
*Rate Dependent, type=JOHNSON COOK
 0.014, 0.011
*Specific Heat
560.,
**
** INTERACTION PROPERTIES
**
*Surface Interaction, name=IntProp-1
*Friction
 0.308,
*Surface Behavior, pressure-overclosure=HARD
*Gap Heat Generation
1., 0.5
**
** PHYSICAL CONSTANTS
**
*Physical Constants, absolute zero=-273.15
**
** BOUNDARY CONDITIONS
**
** Name: BC-1 Type: Symmetry/Antisymmetry/Encastre
*Boundary
_PickedSet27, ENCASTRE
**
** PREDEFINED FIELDS
**
** Name: Predefined Field-1   Type: Temperature
*Initial Conditions, type=TEMPERATURE
_PickedSet28, 25.
** Name: Predefined Field-2   Type: Temperature
*Initial Conditions, type=TEMPERATURE
_PickedSet29, 25.
**
** INTERACTIONS
**
** Interaction: Int-1
*Contact, op=NEW
*Contact Inclusions, ALL EXTERIOR
*Contact Property Assignment
 ,  , IntProp-1
** ----------------------------------------------------------------
**
** STEP: Step-1
**
*Step, name=Step-1, nlgeom=YES
*Dynamic Temperature-displacement, Explicit
, 0.0015
*Bulk Viscosity
0.06, 1.2
**
** BOUNDARY CONDITIONS
**
** Name: BC-2 Type: Velocity/Angular velocity
*Boundary, type=VELOCITY
_PickedSet25, 1, 1, 0.0407437
_PickedSet25, 2, 2
_PickedSet25, 3, 3
_PickedSet25, 4, 4
_PickedSet25, 5, 5
_PickedSet25, 6, 6, -533.333
**
** INTERACTIONS
**
** Interaction: Int-2
*Contact Pair, interaction=IntProp-1, mechanical constraint=KINEMATIC, cpset=Int-2
m_Surf-1, Set-1_CNS_
**
** OUTPUT REQUESTS
**
*Restart, write, number interval=1, time marks=NO
**
** FIELD OUTPUT: F-Output-1
**
*Output, field, number interval=100
*Node Output
A, NT, RF, RFL, U, V
*Element Output, directions=YES
DMICRT, LE, MISES, PE, PEEQ, S, SDEG, SDV, STATUS, TEMP
*Contact Output
CSTRESS,
**
** HISTORY OUTPUT: H-Output-1
**
*Output, history, variable=PRESELECT
*End Step
